** CalculiX Input File
** Element type: C3D4 (4-node tetrahedron, first order)

*NODE, NSET=ALL_NODES
1, -50.000000, -25.000000, -12.500000
2, -50.000000, -25.000000, 12.500000
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
*ELEMENT, TYPE=C3D4, ELSET=ALL_ELEMENTS
1, 1067, 386, 1052, 1055
2, 940, 1409, 1414, 1415
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
*NSET, NSET=FIXED_NODES
1, 3, 5, 7, 13, 14
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
*NSET, NSET=LOAD_NODES
2, 4, 6, 8, 26, 27
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
*MATERIAL, NAME=STEEL
*ELASTIC
210000, 0.3
*DENSITY
7.85e-09

*SOLID SECTION, ELSET=ALL_ELEMENTS, MATERIAL=STEEL

*STEP
*STATIC

*BOUNDARY
FIXED_NODES, 1, 3, 0.0

** Total force: -10000 N across 269 nodes
*CLOAD
2, 3, -37.174721
4, 3, -37.174721
6, 3, -37.174721
8, 3, -37.174721
26, 3, -37.174721
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852, 3, -37.174721

*NODE FILE
U
*EL FILE
S
E

*END STEP
